# Диф Лагранжа | Диф Ньютона | Метод прямокутників | Метод трапецій
trap(a, b, n, h, f1) :=
    I ← 0
    for i ∈ 1 .. n - 1
        I ← I + f1(a + i*h)
    (I + (f1(a) + f1(b))/2)*h
t := [1.2; 1.4; 1.6; 1.8]
y := [3.5; 1.3; 1.1; 2.9]
h1 := 0.2
f1(x) := sin(2*x^2 + x)
a := 0
b := 1
n := 10
L(x) :=
    L ← 0
    for j ∈ 0 .. rows(y) - 1
        l[j] ← y[j]
        for i ∈ 0 .. rows(y) - 1
            l[j] ← l[j]*(x - t[i])/(t[j] - t[i]) if i ≠ j
        L ← L + l[j]
    L
f :=
    for i ∈ 0 .. rows(y) - 1
        x[i] ← t[i]
        f[i, 0] ← y[i]
    for i ∈ 1 .. rows(y) - 1
        for j ∈ 1 .. i
            f[i, j] ← f[i, j - 1] - f[i - 1, j - 1]
    f
h := (b - a)/n
h = 0.1
I := integral(f1(x), x = a .. b)
I = 0.589723
I4 := trap(a, b, n, h, f1)
I4 = 0.584748
# Метод лівих прямокутників
p_left(a, b, n, h, f1) :=
    I ← 0
    for i ∈ 0 .. n - 1
        I ← I + f1(a + i*h)
    I*h
I1 := p_left(a, b, n, h, f1)  # Метод Сімпсона
simp(a, b, n, h, f1) :=
    s1 ← 0
    s2 ← 0
    for i ∈ 1 .. n
        s1 ← s1 + f1(a + i*h) if mod(i, 2) ≠ 0
        s2 ← s2 + f1(a + i*h) otherwise
    (f1(a) - f1(b) + 4*s1 + 2*s2)*h/3
I1 = 0.577692
L(1.25) = 2.7625
N(v) := f[0, 0] + sum(f[i, i]/(h1^i*i!)*product(v - t[k], k = 0 .. i - 1), i = 1 .. rows(y) - 1)  # Метод правих прямокутників
Ld(tt) := d/dtt(L(tt))
N(1.55) = 0.9625
p_right(a, b, n, h, f1) :=
    I ← 0
    for i ∈ 1 .. n
        I ← I + f1(a + i*h)
    I*h
I2 := p_right(a, b, n, h, f1)
I2 = 0.591804
Ld(1.25) = -13.5
Nd(tt) := d/dtt(N(tt))
I5 := simp(a, b, n, h, f1)
I5 = 0.589788
Ld(1.55) = 1.5
Ld(1.7) = 9
Nd(1.25) = -13.5
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I6 := h/6*sum(f1(a + (i - 1)*h) + 4*f1((a + i*h) - 0.5*h) + f1(a + i*h), i = 1 .. n)
Nd(1.55) = 1.5
Nd(1.7) = 9
# Метод середніх прямокутників
I6 = 0.589727
p_middle(a, b, n, h, f1) :=
    I ← 0
    for i ∈ 0 .. n - 1
        I ← I + f1(a + i*h + h/2)
    I*h
I3 := p_middle(a, b, n, h, f1)
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I3 = 0.592216
